// SBML level 3 version 1

model Tyson_2003_1b_Hyperbolic()
  // model units - substance: molecules, time: s, volume: um3, area: um2, length: um

  // Compartments:
  compartment c0 = 50000 um3;

  // Species:
  species R in c0 = 1;
  species RP in c0 = 0;
  species S in c0 = time;

  // Parameters:
  kf_r2 = 1 s_1_uM_1;
  Kf_r3 = 1 s_1;
  Kr_r3 = 0 s_1;

  // Reactions:
  r2: R -> RP; kf_r2*R*S*c0;  // modifiers: S
  r3: RP -> R; (Kf_r3*RP + (-(Kr_r3*R)))*c0;

  // Unit definitions:
  unit molecules = item;
  unit um3 = (1e-6 meter)^3;
  unit um2 = (1e-6 meter)^2;
  unit um = 1e-6 meter;
  unit s = second;
  unit s_1_uM_1 = litre / (second * 1e-6 mole);
  unit s_1 = 1 / second;
end
