// SBML level 3 version 1

model Tyson_2003_1c_Sigmoidal()
  // model units - substance: molecules, time: s, volume: um3, area: um2, length: um

  // Compartments:
  compartment c0 = 50000 um3;

  // Species:
  species S in c0 = time;
  species R in c0 = 1;
  species PR in c0 = 0;

  // Parameters:
  Km_r4 = 1 uM;
  Vmax_r4 has uM_s_1;
  Km_r5 = 1 uM;
  Vmax_r5 = 1 uM_s_1;

  // Assignment rules:
  Vmax_r4 := S;

  // Reactions:
  r4: R -> PR; Vmax_r4*R*(1/(Km_r4 + R))*c0;  // modifiers: S
  r5: PR -> R; Vmax_r5*PR*(1/(Km_r5 + PR))*c0;

  // Unit definitions:
  unit molecules = item;
  unit um3 = (1e-6 meter)^3;
  unit um2 = (1e-6 meter)^2;
  unit um = 1e-6 meter;
  unit s = second;
  unit uM = 1e-6 mole / litre;
  unit uM_s_1 = 1e-6 mole / (litre * second);
end
