// SBML level 3 version 1

model Tyson_2003_1d_PerfectlyAdapted()
  // model units - substance: molecules, time: s, volume: um3, area: um2, length: um

  // Compartments:
  compartment c0 = 50000 um3;

  // Species:
  species S in c0 = 1;
  species R in c0 = 0;
  species X in c0 = 0;

  // Parameters:
  k4_r6 = 1 s_1;
  Kf_r6 has s_1;
  k3_r7 = 1 s_1;
  k1_r8 = 2 s_1;
  k2_r9 = 2 s_1_uM_1;

  // Assignment rules:
  Kf_r6 := k4_r6;

  // Reactions:
  r6: X -> ; Kf_r6*X*c0;
    Kr = 0 uM_s_1;
  r7: -> X; k3_r7*S*c0;  // modifiers: S
  r8: -> R; k1_r8*S*c0;  // modifiers: S
  r9: R -> ; k2_r9*X*R*c0;  // modifiers: X

  // Events:
  event0: at (((time >= t0) && (time <= t0 + 2)) || ((time >= t1) && (time <= t1 + 2)) || ((time >= t2) && (time <= t2 + 2)) || ((time >= t3) && (time <= t3 + 2))): S = 0.2 + S;

  // Unit definitions:
  unit molecules = item;
  unit um3 = (1e-6 meter)^3;
  unit um2 = (1e-6 meter)^2;
  unit um = 1e-6 meter;
  unit s = second;
  unit uM_s_1 = 1e-6 mole / (litre * second);
  unit s_1 = 1 / second;
  unit s_1_uM_1 = litre / (second * 1e-6 mole);
end
